*Heading
** Job name: UT_E2500_VM Model name: Model-1
** Generated by: Abaqus/CAE 2021
*Preprint, echo=NO, model=NO, history=NO, contact=NO
**
** PARTS
**
*Part, name=Part-1
*Node
      1,           0.,  0.100000001
      2,           0., 0.0979999974
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*Element, type=CPE4R
   1,    1,    2,   53,   52
   2,    2,    3,   54,   53
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*Nset, nset=Set-1, generate
    1,  2601,     1
*Elset, elset=Set-1, generate
    1,  2500,     1
** Section: Section-1
*Solid Section, elset=Set-1, material=Material-1
,
*End Part
**
**
** ASSEMBLY
**
*Assembly, name=Assembly
**
*Instance, name=Part-1-1, part=Part-1
*End Instance
**
*Nset, nset=FIXY, instance=Part-1-1, generate
 1326,  2601,    51
*Elset, elset=FIXY, instance=Part-1-1, generate
 1300,  2500,    50
*Nset, nset=LOAD, instance=Part-1-1, generate
    1,  2551,    51
*Elset, elset=LOAD, instance=Part-1-1, generate
    1,  2451,    50
*Nset, nset=Set-3, instance=Part-1-1, generate
 2551,  2601,    1
*End Assembly
*Amplitude, name=Amp-1, definition=SMOOTH STEP
             0.,              0.,              1.,              1.
**
** MATERIALS
**
*Material, name=Material-1
*Density
2400.,
*Depvar
      6,
*User Material, constants=6, unsymm
 2e+10,    0.2,    10., 0.0001,  2e+06,    70.
**
** BOUNDARY CONDITIONS
**
** Name: BC-2 Type: Displacement/Rotation
*Boundary
FIXY, 2, 2
** Name: BC-3 Type: Displacement/Rotation
*Boundary
Set-3, 1, 1
** ----------------------------------------------------------------
**
** STEP: Step-1
**
*Step, name=Step-1, nlgeom=YES
*Dynamic, Explicit, direct user control
5e-07, 0.2
*Bulk Viscosity
0.06, 1.2
**
** BOUNDARY CONDITIONS
**
** Name: BC-1 Type: Displacement/Rotation
*Boundary, amplitude=Amp-1
LOAD, 2, 2, 0.001
**
** OUTPUT REQUESTS
**
*Restart, write, number interval=1, time marks=NO
**
** FIELD OUTPUT: F-Output-1
**
*Output, field, number interval=50
*Node Output
RF, U
*Element Output, directions=YES
LE, S, SDV
**
** HISTORY OUTPUT: H-Output-3
**
*Output, history, frequency=1
*Node Output, nset=FIXY
RF2,
**
** HISTORY OUTPUT: H-Output-2
**
*Node Output, nset=LOAD
U2,
**
** HISTORY OUTPUT: H-Output-1
**
*Output, history, variable=PRESELECT
*End Step
